############################################################################

# Soft Robotics Lab, Oxford Uni.
# Template for simulating pneumatic actuator on Sofa

# Wenye Ouyang (Owen)
# wenye@robots.ox.ac.uk
# Last review date: 20/4/2020

############################################################################

import Sofa
import math
import os
#import a floor from soft robot template library
from stlib.physics.rigid import Floor
from stlib.scene import MainHeader, ContactHeader

density = 1.14
volume = 32.171
mass = density*volume*1e-3

path = os.path.dirname(os.path.abspath(__file__))

#Create a scene
def createScene(rootNode):


        #Display options
        rootNode.createObject('VisualStyle', displayFlags='showVisualModels showBehaviorModels hideCollisionModels hideBoundingCollisionModels showForceFields showInteractionForceFields hideWireframe')

        #load plugins
        rootNode.createObject('RequiredPlugin', name='SoftRobots', pluginName='SoftRobots')
        rootNode.createObject('RequiredPlugin', name='SofaPython', pluginName='SofaPython')

        #Define gravity along three axis
        #rootNode.findData('gravity').value= '-9810 0 0'
        rootNode.createObject('PythonScriptController', filename="controller/Controller.py", classname="controller")
        rootNode.createObject('FreeMotionAnimationLoop')
        rootNode.createObject('GenericConstraintSolver', tolerance="1e-12", maxIterations="10000")

        MainHeader(rootNode, gravity=[0,0,0.0])
        ContactHeader(rootNode, alarmDistance=0.2, contactDistance=0.09)

        #rootNode.createObject('CollisionPipeline', verbose="0")
    	#rootNode.createObject('BruteForceDetection', name="N2")
    	#rootNode.createObject('CollisionResponse', response="FrictionContact", responseParams="mu=0.6")
    	#rootNode.createObject('LocalMinDistance', name="Proximity", alarmDistance="0.2", contactDistance="0.09", angleCone="0.00")

        #rootNode.createObject('BackgroundSetting', color='0 0.168627 0.211765')
    	#rootNode.createObject('OglSceneFrame', style="Arrows", alignment="TopRight")

        #Load a floor in the scene
        Floor(rootNode, translation=[-5,30,30], rotation = [0,0,90] , isAStaticObject=True)


        ########
        ########Link 1
        #Load the actuator
        pneu1 = rootNode.createChild('pneu1')
        pneu1.createObject('EulerImplicit', name='odesolver', rayleighStiffness='0.1', rayleighMass='0.1')
        pneu1.createObject('SparseLDLSolver', name='directSolver')
        #pneu1.createObject('TetrahedronSetTopologyModifier')
        #pneu1.createObject('TetrahedronSetTopologyAlgorithms', template='Vec3d')
        #pneu1.createObject('TetrahedronSetGeometryAlgorithms', template='Vec3d')

        #It has to be a file with volumetric mesh
        #Recommend CGAL/gmsh
        #More details can be found in tutorial "Mesh generation"
        pneu1.createObject('MeshVTKLoader', name='loader', filename='data/mesh/Ex30.vtu',translation=[0,0,0], rotation = [0,0,0])
        pneu1.createObject('Mesh', src='@loader', name='container')

        #Specify mesh type, in this example we use tetrahedra
        pneu1.createObject('MechanicalObject', name='tetras', template='Vec3d', showObject='0', showObjectScale='1')

        #Speficy mechanical properties
        #pneu1.createObject('OgdenForceField', template='Vec3d', mu1='0.2127', mu2='0.0375', mu3='-0.001', alpha1='1.3212', alpha2='4.318', alpha3='-1.0248', d1='1', d2='1', d3='1', PSDStabilization="true" )
        pneu1.createObject('TetrahedronFEMForceField', template='Vec3d', name='FEM', method='large', poissonRatio='0.45',  youngModulus='330.8', drawAsEdges="true")
        pneu1.createObject('UniformMass', totalMass= mass)
        #pneu1.createObject('UniformMass', totalMass = mass)

        #Define stiff layer
        pneu1.createObject('BoxROI', name='boxROISubTopo', box='80 -5 -10 85 60 60', drawBoxes='0')
        modelSubTopo = pneu1.createChild('modelSubTopo')
        modelSubTopo.createObject('Mesh', position='@loader.position', tetrahedra="@boxROISubTopo.tetrahedraInROI", name='container')
        modelSubTopo.createObject('TetrahedronFEMForceField', template='Vec3d', name='FEM', method='large', poissonRatio='0.3',  youngModulus='1e12')

        pneu1.createObject('BoxROI', name='boxROISubTopo', box='-5 -5 -10 3 60 60', drawBoxes='0')
        modelSubTopo = pneu1.createChild('modelSubTopo')
        modelSubTopo.createObject('Mesh', position='@loader.position', tetrahedra="@boxROISubTopo.tetrahedraInROI", name='container')
        modelSubTopo.createObject('TetrahedronFEMForceField', template='Vec3d', name='FEM', method='large', poissonRatio='0.3',  youngModulus='1e12')

        #Define boundry layer
        pneu1.createObject('BoxROI', name='boxROI', box='-5 -5 -10 3 60 60', drawBoxes= '0')
        pneu1.createObject('RestShapeSpringsForceField', points='@boxROI.indices', stiffness='1e12', angularStiffness='1e12')
        pneu1.createObject('LinearSolverConstraintCorrection', solverName='directSolver')

        #Define the cavity inside the chambers
        cavity = pneu1.createChild('cavity')
        cavity.createObject('MeshSTLLoader', name='cavityLoader', filename='data/mesh/Ex3Cav.stl', translation=[0,0,2.5], rotation = [0,0,0])
        cavity.createObject('Mesh', src='@cavityLoader', name='cavityMesh')
        cavity.createObject('MechanicalObject', name='cavity')
        cavity.createObject('SurfacePressureConstraint', name="SurfacePressureConstraint", template='Vec3d', value="0", triangles='@cavityMesh.triangles', drawPressure='1',drawScale='0.0002',  valueType="pressure")
        cavity.createObject('BarycentricMapping', name='mapping', mapForces='false', mapMasses='false')

        constraint = pneu1.createChild('Constraint')
        #constraint.createObject('MechanicalObject', name="points", template="Vec3d", position = '84 10 10 84 49 49', showObject="true", showObjectScale="5")
        constraint.createObject('MechanicalObject', name="points", template="Vec3d", position = '85 30 30 85 50 30 85 30 50 85 30 10 85 10 30', showObject="false", showObjectScale="0")
        constraint.createObject('BarycentricMapping')

        collisionpneu1 = pneu1.createChild('collisionPneu1')
        collisionpneu1.createObject('MeshSTLLoader', name='loader', filename='data/mesh/Ex3.stl', translation=[0,0,0], rotation = [0,0,0])
        collisionpneu1.createObject('Mesh', src='@loader', name='topo')
        collisionpneu1.createObject('MechanicalObject', name='collisMech')
        collisionpneu1.createObject('Triangle', selfCollision="false")
        collisionpneu1.createObject('Line',selfCollision="false")
        collisionpneu1.createObject('Point', selfCollision="false")
        collisionpneu1.createObject('BarycentricMapping')
        #OPTIONAL: Create a visual model for the actuators

        #modelVisu = pneu1.createChild('visu')
        #modelVisu.createObject('MeshSTLLoader', name="loader", filename="data/mesh/Ex3.stl")
        #modelVisu.createObject('OglModel', src="@loader", template='ExtVec3f', color='0.7 0.7 0 0.6',translation=[0,0,0], rotation = [0,0,0])
        #modelVisu.createObject('BarycentricMapping')

        #####Link 2
        #####
        #Load the actuator
        pneu2 = rootNode.createChild('pneu2')
        pneu2.createObject('EulerImplicit', name='odesolver', rayleighStiffness='0.1', rayleighMass='0.1')
        pneu2.createObject('SparseLDLSolver', name='directSolver')
        #pneu1.createObject('TetrahedronSetTopologyModifier')
        #pneu1.createObject('TetrahedronSetTopologyAlgorithms', template='Vec3d')
        #pneu1.createObject('TetrahedronSetGeometryAlgorithms', template='Vec3d')

        #It has to be a file with volumetric mesh
        #Recommend CGAL/gmsh
        #More details can be found in tutorial "Mesh generation"
        pneu2.createObject('MeshVTKLoader', name='loader', filename='data/mesh/Ex30.vtu',translation=[90,0,0], rotation = [0,0,0])
        pneu2.createObject('Mesh', src='@loader', name='container')

        #Specify mesh type, in this example we use tetrahedra
        pneu2.createObject('MechanicalObject', name='tetras', template='Vec3d', showObject='0', showObjectScale='1')

        #Speficy mechanical properties
        pneu2.createObject('TetrahedronFEMForceField', template='Vec3d', name='FEM', method='large', poissonRatio='0.45',  youngModulus='330.8', drawAsEdges="true")
        pneu2.createObject('UniformMass', totalMass = mass)
        #pneu2.createObject('UniformMass', totalMass = mass)

        #Define stiff layer
        pneu2.createObject('BoxROI', name='boxROISubTopo', box='170 -5 -10 175 60 60', drawBoxes='0')
        modelSubTopo = pneu2.createChild('modelSubTopo')
        modelSubTopo.createObject('Mesh', position='@loader.position', tetrahedra="@boxROISubTopo.tetrahedraInROI", name='container')
        modelSubTopo.createObject('TetrahedronFEMForceField', template='Vec3d', name='FEM', method='large', poissonRatio='0.3',  youngModulus='1e12')

        pneu2.createObject('BoxROI', name='boxROISubTopo', box='85 -5 -10 93 60 60', drawBoxes='0')
        modelSubTopo = pneu2.createChild('modelSubTopo')
        modelSubTopo.createObject('Mesh', position='@loader.position', tetrahedra="@boxROISubTopo.tetrahedraInROI", name='container')
        modelSubTopo.createObject('TetrahedronFEMForceField', template='Vec3d', name='FEM', method='large', poissonRatio='0.3',  youngModulus='1e12')

        #Define boundry layer
        pneu2.createObject('BoxROI', name='boxROI', box='85-5 -10 93 60 60', drawBoxes= '0')
        pneu2.createObject('RestShapeSpringsForceField', points='@boxROI.indices', stiffness='0', angularStiffness='0')
        pneu2.createObject('LinearSolverConstraintCorrection', solverName='directSolver')

        #Define the cavity inside the chambers
        cavity = pneu2.createChild('cavity')
        cavity.createObject('MeshSTLLoader', name='cavityLoader', filename='data/mesh/Ex3Cav.stl', translation=[90,0,2.5], rotation = [0,0,0])
        cavity.createObject('Mesh', src='@cavityLoader', name='cavityMesh')
        cavity.createObject('MechanicalObject', name='cavity')
        cavity.createObject('SurfacePressureConstraint', name="SurfacePressureConstraint", template='Vec3d', value="0", triangles='@cavityMesh.triangles', drawPressure='1',drawScale='0.0002',  valueType="pressure")
        cavity.createObject('BarycentricMapping', name='mapping', mapForces='false', mapMasses='false')

        constraint = pneu2.createChild("Constraint")
        #constraint.createObject('MechanicalObject', name="points", template="Vec3d", position = '84 10 10 84 49 49', showObject="true", showObjectScale="5")
        constraint.createObject('MechanicalObject', name="points", template="Vec3d", position = '85 30 30 85 50 30 85 30 50 85 30 10 85 10 30', showObject="false", showObjectScale="0")
        constraint.createObject("BarycentricMapping")

        collisionpneu2 = pneu2.createChild('collisionPneu2')
        collisionpneu2.createObject('MeshSTLLoader', name='loader', filename='data/mesh/Ex3.stl', translation=[90,0,0], rotation = [0,0,0])
        collisionpneu2.createObject('Mesh', src='@loader', name='topo')
        collisionpneu2.createObject('MechanicalObject', name='collisMech')
        collisionpneu2.createObject('Triangle', selfCollision="false")
        collisionpneu2.createObject('Line',selfCollision="false")
        collisionpneu2.createObject('Point', selfCollision="false")
        collisionpneu2.createObject('BarycentricMapping')

        rootNode.createObject('BilateralInteractionConstraint', template = "Vec3d", object1 = "@pneu1/Constraint/points", object2 = "@pneu2/Constraint/points", first_point = "0 1 2 3 4", second_point = "0 1 2 3 4")

        ###cube = rootNode.createChild("Cube")    	### Mechanical model    	totalMass = 1.0    	volume = 1.0    	inertiaMatrix = [1.0, 0.0, 0.0, 0.0, 1.0, 0.0, 0.0, 0.0, 1.0]    	cube.createObject('MechanicalObject', name="DOF", template="Rigid3", translation=[80.0,0.0,0.0], rotation=[0.0,0.0,0.0])    	cube.createObject('UniformMass', name="vertexMass", vertexMass=[totalMass, volume, inertiaMatrix[:]])    	# Material behaviour when submitted to constraints    	cube.createObject('UncoupledConstraintCorrection')    	### Time integration and solver    	cube.createObject('EulerImplicitSolver', name='odesolver')    	cube.createObject('CGLinearSolver', name='Solver')    	### Visual Object of the Cube    	visual = cube.createChild("CubeVisual")    	# Graphic model based on a mesh    	visual.createObject('MeshObjLoader', name="loader", filename="mesh/smCube27.obj", triangulate="true")    	visual.createObject('OglModel', name="Visual", src="@loader", color=[0.1,0.0,1.0], scale=1.0)    	# Building a correspondance between the mechanical and the graphical representation    	visual.createObject('RigidMapping')    	### Collision Object for the Cube    	collision = cube.createChild("CubeCollisionModel")    	collision.createObject('MeshObjLoader', name="loader", filename="mesh/smCube27.obj", triangulate="true", scale=1.0)    	collision.createObject('MeshTopology', src="@loader")    	collision.createObject('MechanicalObject')    	collision.createObject('TTriangleModel')    	collision.createObject('TLineModel')    	collision.createObject('TPointModel')    	collision.createObject('RigidMapping')
